BAS4 := 4*10^-3
a := 5
BAS62 := 5*10^-9
R := 8.31
b := 3
EAKT4 := 0
d := 3
T := 473
EAKT62 := 8.22*10^4
S := a*b*2 + a*d*2 + b*d*2
S = 78
k4 := BAS4*exp(EAKT4*(T - 298.15)/(T*R*298.5))
k4 = 0.004
V := a*b*d
k62 := BAS62*exp(EAKT62*(T - 298.15)/(T*R*298.5))
V = 45
k62 = 0.00104476
Fgs := 10^-2*S/V
Fsg := 10^-8
t0 := 0
t1 := 373
Given
d/dt(I2G(t)) == -k4*I2G(t)*S/V + k62*S/(V*1000)*Iw(t)
I2G(t0) == 1
Iw(t0) == 0
d/dt(Iw(t)) == k4*I2G(t)*1000 - k62*Iw(t)
[I2G; Iw] := Odesolve([I2G; Iw], t, t1)
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