a := 3
b := 5
d := 3
V := a*b*d
V = 45
S := 2*(a*b + a*d + b*d)
S = 78
Fgs := 10^-2*S/V
Fsg := 10^-8
t0 := 0
t1 := 1000
Given
d/dt(NG(t)) == -Fgs*NG(t) + Fsg*NG(t)
NG(t0) == 1
NS(t0) == 0
d/dt(NS(t)) == Fgs*NG(t) - Fsg*NS(t)
[NG; NS] := Odesolve([NG; NS], t, t1)
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