a := 5
EAKT4 := 0
BAS4 := 4*10^-3
b := 3
EAKT62 := 8.22*10^4
BAS62 := 5*10^-9
d := 3
R := 8.31
BAS76 := 1*10^-5
EAKT76 := 0
T := 473
S := a*b*2 + a*d*2 + b*d*2
V := a*b*d
k4 := BAS4*exp(EAKT4*(T - 298.5)/(T*R*298.5))
k62 := BAS62*exp(EAKT62*(T - 298.5)/(T*R*298.5))
k76 := BAS76*exp(EAKT76*(T - 298.5)/(T*R*298.5))
k77 := 0
t0 := 0
t1 := 86400
Given
d/dt(I2G(t)) == -k4*I2G(t)*S/V + k62*S/(V*1000)*Iw(t)
I2G(t0) == 1
Iw(t0) == 0
d/dt(Iw(t)) == k4*I2G(t)*1000 - k62*Iw(t) - k76*Iw(t) + k77*Ich(t)*0.5
d/dt(Ich(t)) == k76*Iw(t)*2 - k77*Ich(t)
Ich(0) == 0
[I2G; Iw; Ich] := Odesolve([I2G; Iw; Ich], t, t1)
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