a := 5
b := 3
R := 8.31
d := 3
T := 300
S := a*b*2 + a*d*2 + b*d*2
S = 78
V := a*b*d
V = 45
BAS4 := 4*10^-3
BAS62 := 5*10^-9
EAKT4 := 0
EAKT62 := 8.22*10^4
k4 := BAS4*exp(EAKT4*(T - 298.15)/(T*R*298.5))
k62 := BAS62*exp(EAKT62*(T - 298.15)/(T*R*298.5))
t0 := 0
t1 := 60
Given
d/dt(I2G(t)) == -k4*I2G(t)*S/V + k62*Iw(t)*S/(V*1000)
IG2(t0) == 1
d/dt(Iw(t)) == k4*I2G(t)*1000 - k62*Iw(t)
Iw(t0) == 0
[I2G; Iw] := Odesolve([I2G; Iw], t, t1)  # error: Слишком мало начальных условий.
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